units lj
atom_style atomic
boundary p p p
timestep 0.001

read_data restart.atoms

mass 1 1.0

pair_style lj/cut 2.5
pair_coeff 1 1 1.0 1.0 2.5

neighbor 0.3 bin
neigh_modify every 20 delay 0 check no

fix 1 all nve

dump id all atom 100 restart.dump
thermo_style custom step temp etotal
thermo 1000
restart 20000 restart.restart

run 20000
